// COMSOL Multiphysics 6.1.0.357 model "GetRadius.mph"
// Outline of the model tree

Parameters
  Radius = 18[mm]  // Radius
  W = 4.3[mm]  // Width
  W_2par = 1.37[mm]

Geometry
  geom1 "Geometry 1" (2D axisymmetric, length unit mm)
    r1: Rectangle | pos = {Radius, 0}; rot = 360; size = {W, 20}
    fin: Finalize "Form Union"

Materials
  mat1: Common "Rubber" (disabled) on all domains
    def "Basic"
      density = 1100[kg/m^3]
      thermalexpansioncoefficient = 200e-6[1/K]
      lossfactor = 0.06
      thermalconductivity = 0.5[W/(m*K)]
      heatcapacity = 1900[J/(kg*K)]
    Lame "Lamé parameters"
      lambLame = 24.5[MPa]
      muLame = 0.5[MPa]
    MooneyRivlin
      C10 = -98.093[kPa]
      C01 = -9.0752[kPa]
      C11 = 194.68[kPa]
      C20 = 0.36647[kPa]
      C02 = -4.9841[kPa]
      C21 = 0
      C12 = 0
      C30 = 0
      C03 = 0
    Yeoh
      c1YE = 100[kPa]
      c2YE = 6[kPa]
      c3YE = -30[Pa]
    Varga
      c1VA = 1.05[MPa]
      c2VA = 0.45[MPa]
    ArrudaBoyce
      Nseg = 32
      mu0 = 0.5[MPa]
  mat2: Common "MR2" (disabled) on domains 1
    def "Basic"
      density = 1100[kg/m^3]
      thermalexpansioncoefficient = 200e-6[1/K]
      lossfactor = 0.06
      thermalconductivity = 0.5[W/(m*K)]
      heatcapacity = 1900[J/(kg*K)]
    Lame "Lamé parameters"
      lambLame = 24.5[MPa]
      muLame = 0.5[MPa]
    MooneyRivlin
      C10 = 10.213[kPa]
      C01 = 314.22[kPa]
      C11 = 0
      C20 = 0
      C02 = 0
      C21 = 0
      C12 = 0
      C30 = 0
      C03 = 0
    Yeoh
      c1YE = 100[kPa]
      c2YE = 6[kPa]
      c3YE = -30[Pa]
    Varga
      c1VA = 1.05[MPa]
      c2VA = 0.45[MPa]
    ArrudaBoyce
      Nseg = 32
      mu0 = 0.5[MPa]
  mat4: Common "MR5" on domains 1
    def "Basic"
      density = 1100[kg/m^3]
      thermalexpansioncoefficient = 200e-6[1/K]
      lossfactor = 0.06
      thermalconductivity = 0.5[W/(m*K)]
      heatcapacity = 1900[J/(kg*K)]
    Lame "Lamé parameters"
      lambLame = 24.5[MPa]
      muLame = 0.5[MPa]
    MooneyRivlin
      C10 = -194[kPa]
      C01 = 347[kPa]
      C11 = 32.24[Pa]
      C20 = -0.35[Pa]
      C02 = 47.45[kPa]
      C21 = 0
      C12 = 0
      C30 = 0
      C03 = 0
    Yeoh
      c1YE = 100[kPa]
      c2YE = 6[kPa]
      c3YE = -30[Pa]
    Varga
      c1VA = 1.05[MPa]
      c2VA = 0.45[MPa]
    ArrudaBoyce
      Nseg = 32
      mu0 = 0.5[MPa]

Physics
  solid: SolidMechanics "Solid Mechanics - Get Radius" on all domains
    dependent variable u = {u, v, w}
    lemm1: LinearElasticModel "Linear Elastic Material 1" (default)
    axi1: AxialSymmetrySolid "Axial Symmetry 1" (default)
    free1: Free (default)
    init1: init "Initial Values 1" (default)
    hmm1: HyperelasticModel "Hyperelastic Material 1" on all domains | MaterialModel = MooneyRivlin5parameters
    bndl1: BoundaryLoad on boundaries 1 | LoadType = FollowerPressure; FollowerPressure = 80[mmHg]
    roll1: Roller on boundaries 2, 3

Mesh
  mesh1 "Mesh 1" (physics-controlled)

Studies
  std1 "Study 1 - Get Radius (80mmHg)"
    param: Parametric "Parametric Sweep" | pname = Radius; plistarr = 15.31; punit = mm
    stat: Stationary | initstudy = zero; initsol = current; notstudy = zero; mesh = {geom1, mesh1}

Solver configurations
  sol1 "Solution 1" (study std1)
    v1: Variables "Dependent Variables 1"
    s1: Stationary "Stationary Solver 1"
      dDef: Direct
      fc1: FullyCoupled | linsolver = dDef
  sol2 "Parametric Solutions 1" (study std1)

Datasets
  dset1: Solution | solution = sol1
  dset1solidrev: Revolve2D "Revolution 2D" | data = dset1; startangle = -90; revangle = 225
  dset2: Solution | solution = sol2
  dset2solidrev: Revolve2D "Revolution 2D 2" | data = dset2; startangle = -90; revangle = 225

Derived values
  pev1: EvalPoint "Point Evaluation 1" on points 2, 4
    data = dset2
    table = tbl1
    expr = {solid.disp, }
    unit = {mm, }
    descr = {Displacement magnitude, mål}

Tables
  tbl1: Table
    // Point Evaluation 1
    Radius (mm) | Displacement magnitude (mm), Point: 2 | Displacement magnitude (mm), Point: 4
    15.31 | 0.751663 | 0.594646

Plots
  pg1: PlotGroup2D "Get Radius - 80mmHg" | data = dset2; symmetryaxis = on
    surf1: Surface | data = dset2; expr = solid.disp
      def: Deform "Deformation" | expr = {u, w}; descr = Displacement field